# OpenSim document version 30000
Model KneeProsthesis:
  length_units: meters
  force_units: N
  gravity: 0 -9.80665 0
  credits:
    Author: The OpenSim Teams
    License:
    Creative Commons (CCBY 3.0). You are free to distribute, remix, tweak, and build upon this work, even commercially,
    as long as you credit us for the original creation.
    http://creativecommons.org/licenses/by/3.0/
  BodySet:
    Body ground: mass=0 mass_center=(0 0 0) inertia_xx=1 inertia_yy=1 inertia_zz=1
    Body femoral_component: mass=0.2 mass_center=(0 0 0) inertia_xx=0.1333333 inertia_yy=0.1333333 inertia_zz=0.1333333
        meshes=femoral_component.vtp
      WeldJoint femurToGround: parent_body=ground location_in_parent=(0 0 0) location=(0 0 0)
    Body tibia_component: mass=0.2 mass_center=(0 0 0) inertia_xx=0.1333333 inertia_yy=0.1333333 inertia_zz=0.1333333
        meshes=tibial_tray.vtp
      CustomJoint knee_joint: parent_body=femoral_component location_in_parent=(0 0 0) location=(0 0 0) reverse=true
        Coordinate knee_flexion: motion_type=rotational default_value=0 range=(-1.5708 0.3491) clamped=true
        Coordinate knee_adduction: motion_type=rotational default_value=0 range=(-1.1781 1.1781) clamped=true
        Coordinate knee_rotation: motion_type=rotational default_value=0 range=(-1.1781 1.1781) clamped=true
        Coordinate knee_tx: motion_type=translational default_value=0 range=(-0.1 0.1) clamped=true
        Coordinate knee_ty: motion_type=translational default_value=0.042 range=(0.03 0.06) clamped=true
        Coordinate knee_tz: motion_type=translational default_value=0 range=(-0.1 0.1) clamped=true
        SpatialTransform:
          TransformAxis rotation1: coordinates=knee_flexion axis=(0 0 1) LinearFunction(coefficients=1 0)
          TransformAxis rotation2: coordinates=knee_adduction axis=(1 0 0) LinearFunction(coefficients=1 0)
          TransformAxis rotation3: coordinates=knee_rotation axis=(0 -1 0) LinearFunction(coefficients=1 0)
          TransformAxis translation1: coordinates=knee_tx axis=(1 0 0) LinearFunction(coefficients=1 0)
          TransformAxis translation2: coordinates=knee_ty axis=(0 1 0) LinearFunction(coefficients=1 0)
          TransformAxis translation3: coordinates=knee_tz axis=(0 0 1) LinearFunction(coefficients=1 0)
  ForceSet:
    CoordinateActuator [values shared by the 6 below unless stated]: min_control=-1 max_control=1 optimal_force=500
    CoordinateActuator knee_flexion: coordinate=knee_flexion
    CoordinateActuator knee_adduction: coordinate=knee_adduction
    CoordinateActuator knee_rotation: coordinate=knee_rotation
    CoordinateActuator knee_tx: coordinate=knee_tx
    CoordinateActuator knee_ty: coordinate=knee_ty optimal_force=1000
    CoordinateActuator knee_tz: coordinate=knee_tz
