# OpenSim document version 40000
InverseKinematicsTool CP3_T0_28:
  results_directory: ./
  model_file: C:\Users\u0145647\OneDrive - KU Leuven\KU Leuven\ParameterEstimation\CP3\Data\Model\mri_temp_v4.osim
  constraint_weight: Inf
  accuracy: 1e-5
  marker_file: C:\Users\u0145647\OneDrive - KU Leuven\KU Leuven\ParameterEstimation\CP3\Data\TRC\CP3_T0_28.trc
  time_range: 0.03 4.13
  report_errors: true
  output_motion_file: C:\Users\u0145647\OneDrive - KU Leuven\KU Leuven\ParameterEstimation\CP3\Data\IK\CP3_T0_28_MRI_IK.mot
  report_marker_locations: false
  IKTaskSet:
    IKMarkerTask C7: apply=true weight=0.1
    IKMarkerTask T10: apply=true weight=0.1
    IKMarkerTask STRN: apply=true weight=0.1
    IKMarkerTask CLAV: apply=true weight=0.1
    IKMarkerTask RSHO: apply=true weight=0.1
    IKMarkerTask LSHO: apply=true weight=0.1
    IKMarkerTask RASI: apply=true weight=1
    IKMarkerTask LASI: apply=true weight=1
    IKMarkerTask LPSI: apply=true weight=1
    IKMarkerTask RPSI: apply=true weight=1
    IKMarkerTask RKNE: apply=true weight=1
    IKMarkerTask RMEK: apply=true weight=1
    IKMarkerTask RANK: apply=true weight=1
    IKMarkerTask RMM: apply=true weight=1
    IKMarkerTask RSTL: apply=true weight=0.2
    IKMarkerTask RLCA: apply=true weight=0.2
    IKMarkerTask RHEE: apply=true weight=0.2
    IKMarkerTask RTOE: apply=true weight=0.1
    IKMarkerTask RCM5: apply=true weight=0.1
    IKMarkerTask LKNE: apply=true weight=1
    IKMarkerTask LMEK: apply=true weight=1
    IKMarkerTask LANK: apply=true weight=1
    IKMarkerTask LMM: apply=true weight=1
    IKMarkerTask LSTL: apply=true weight=0.2
    IKMarkerTask LLCA: apply=true weight=0.2
    IKMarkerTask LHEE: apply=true weight=0.2
    IKMarkerTask LTOE: apply=true weight=0.1
    IKMarkerTask LCM5: apply=true weight=0.1
